L := 8
P := 3000
q := 1000
d := 1.5
z := 0
z1 := 0.1*L = 0.8
z2 := 0.2*L = 1.6
z3 := 0.3*L = 2.4
z4 := 0.4*L = 3.2
Qq1 := q*(L/2 - z1) = 3200
Mq1 := (q*z1)/2*(L - z1) = 2880
z5 := 0.5*L = 4
Mq1 = 2880
(q*z2)/2*(L - z2) = 5120
Qq2 := q*(L/2 - z2) = 2400
Mq2 := 5.12*10^3
Qq3 := q*(L/2 - z3) = 1600
(q*z3)/2*(L - z3) = 6720
Mq3 := 6.72*10^3
Qq4 := q*(L/2 - z4) = 800
Mq4 := 7.68*10^3
(q*z4)/2*(L - z4) = 7680
Mq5 := 8*10^3
Qq5 := q*(L/2 - z5) = 0
Mq := 0
(q*z5)/2*(L - z5) = 8000
Qq := q*(L/2 - z) = 4000
(q*z)/2*(L - z) = 0
# Для 0.2L
Rb := (-P*(0.2*L - d/2) - P*(0.2*L + d/2))/(-L) = 1200
Ra := 2*P - Rb = 4800
x1 := 0.2*L - d/2 = 0.85
x2 := d
x3 := L - (0.2*L + d/2)
Mp1 := Ra*x1 = 4080
Qp1 := Ra = 4800
Qp2 := Ra - P = 1800
Mp2 := Ra*(0.2*L - d/2 + x2) = 11280
Mp3 := Ra*(0.2*L + d/2 + x3) - P*(d + x3) - P*x3 = 0
Qp3 := Ra - 2*P = -1200
# Для 0.3L
Rb := (-P*(0.3*L - d/2) - P*(0.3*L + d/2))/(-L) = 1800
Ra := 2*P - Rb = 4200
x1 := 0.3*L - d/2
x2 := d
x3 := 0
Mp1 := Ra*x1 = 6930
Qp1 := Ra = 4200
Qp2 := Ra - P = 1200
Mp2 := Ra*(0.3*L - d/2 + x2) = 13230
Mp3 := Ra*(0.3*L + d/2 + x3) - P*(d + x3) - P*x3 = 8730
Qp3 := Ra - 2*P = -1800
# Для 0.4L
Rb := (-P*(0.4*L - d/2) - P*(0.4*L + d/2))/(-L) = 2400
Ra := 2*P - Rb = 3600
x1 := 0.4*L - d/2
x2 := d
x3 := L - (0.4*L + d/2)
Mp1 := Ra*x1 = 8820
Qp1 := Ra = 3600
Qp2 := Ra - P = 600
Mp2 := Ra*(0.4*L - d/2 + x2) = 14220
Mp3 := Ra*(0.4*L + d/2 + x3) - P*(d + x3) - P*x3 = 0
Qp3 := Ra - 2*P = -2400
# Для 0.5L
Rb := (-P*(0.5*L - d/2) - P*(0.5*L + d/2))/(-L) = 3000
Ra := 2*P - Rb = 3000
x1 := 0
x2 := 0
x3 := 0
Mp1 := Ra*x1 = 0
Qp1 := Ra = 3000
Qp2 := Ra - P = 0
Mp2 := Ra*(0.5*L - d/2 + x2) = 9750
Mp3 := Ra*(0.5*L + d/2 + x3) - P*(d + x3) - P*x3 = 9750
Qp3 := Ra - 2*P = -3000
L1 := 800
fmax := 1/500*L1 = 1.6
m1 := 0.9
Rc := 2100
n1 := 1.1
n2 := 1.3
E := 2*10^6
hж := 1/4*Rc*m1/E*L1*L1/fmax*(5/(6*n1) + 1/n2*(1 - (L1 - d)^2/(3*L1^2))) = 120.143
Mpmax := 1.425*10^6 = 1425000
Mqmax := 8*10^5
5000 = 5000
h := 70
Sb := 1*sqrt(h)/12.5 = 0.669328
Sr := Sb*1.2 = 0.803194
br := 20*Sr = 16.0639
hb := h - 2*Sr = 68.3936
hэ := sqrt(3*(Mqmax*n1 + Mpmax*n2)/(2*Rc*m1*Sb)) = 56.9214
Jф := (Sb*hb^3)/12 + 2*(br*Sr^3/12 + br*Sr*((h - Sr)/2)^2) = 48735.5
Gmax := (Mqmax*n1 + Mpmax*n2)*h/(Jф*m1*2) = 2180.42
Sоб := br*Sr*((hb + Sr)/2) + hb/2*Sb + hb/4 = 486.39
Qqmax := 4*10^3
Qpmax := 5.4*10^3
Mqmax = 800000
Mpmax = 1425000
Tmax := ((Qqmax*n1 + Qpmax*n2)*Sоб)/(Jф*Sb*m1) = 189.201
Gж := (Mqmax*n1 + Mpmax*n2)/(Jф*m1) = 62.2977
Mqx := q*z*(L - z)/2 = 0
Qqx := q*(L/2 - z) = 4000
Тж := (Qqx*n1 + Qpx*n2)/(Sb*hb*m1)  # error: Эта переменная не определена.
0
# для икс равно нулю
zоб0 := 2
dоб := 2
Mqx0 := q*zоб0*(L - zоб0)/2 = 6000
Gэкв := sqrt(Gж^2 + 3*Tж^2)  # error: Эта переменная не определена.
Qqx0 := q*(L/2 - zоб0) = 2000
Mpx0 := 415625
Qpx0 := 243800
Gж0 := (Mqx0*n1 + Mpx0*n2)/(Jф*m1) = 12.4689
Тж0 := (Qqx0*n1 + Qpx0*n2)/(Sb*hb*m1) = 7746.12
Gэкв0 := sqrt(Gж0^2 + 3*Тж0^2) = 13416.7
1
# для икс равно 01Л
zоб1 := 0.1*L + dоб/2 = 1.8
Mqx1 := q*zоб1*(L - zоб1)/2 = 5580
Qqx1 := q*(L/2 - zоб1) = 2200
Mpx1 := 8370*10^2
Qpx1 := 5400*10^2
Gж1 := (Mqx1*n1 + Mpx1*n2)/(Jф*m1) = 24.9473
Тж1 := (Qqx1*n1 + Qpx1*n2)/(Sb*hb*m1) = 17097.6
Gэкв1 := sqrt(Gж1^2 + 3*Тж1^2) = 29613.9
2
# для икс равно 02Л
zоб2 := 0.2*L + dоб/2 = 2.6
Mqx2 := q*zоб2*(L - zоб2)/2 = 7020
Qqx2 := q*(L/2 - zоб2) = 1400
Mpx2 := 1.128*10^6 = 1128000
Qpx2 := 4.8*10^5 = 480000
Gж2 := (Mqx2*n1 + Mpx2*n2)/(Jф*m1) = 33.6082
Тж2 := (Qqx2*n1 + Qpx2*n2)/(Sb*hb*m1) = 15183
Gэкв2 := sqrt(Gж2^2 + 3*Тж2^2) = 26297.8
# для икс равно 03Л
zоб3 := 0.3*L + dоб/2 = 3.4
Mqx3 := q*zоб3*(L - zоб3)/2 = 7820
Qqx3 := q*(L/2 - zоб3) = 600
Mpx3 := 1.323*10^6
Qpx3 := 4.2*10^5
Gж3 := (Mqx3*n1 + Mpx3*n2)/(Jф*m1) = 39.4078
Тж3 := (Qqx3*n1 + Qpx3*n2)/(Sb*hb*m1) = 13268.5
Gэкв3 := sqrt(Gж3^2 + 3*Тж3^2) = 22981.7
# для икс равно 04Л
zоб4 := 0.4*L + dоб/2 = 4.2
Mqx4 := q*zоб4*(L - zоб4)/2 = 7980
Qqx4 := q*(L/2 - zоб4) = -200
Mpx4 := 1.422*10^6
Qpx4 := 3.6*10^5
Gж4 := (Mqx4*n1 + Mpx4*n2)/(Jф*m1) = 42.346
Тж4 := (Qqx4*n1 + Qpx4*n2)/(Sb*hb*m1) = 11353.9
Gэкв4 := sqrt(Gж4^2 + 3*Тж4^2) = 19665.6
# для икс равно 05Л
