N1 := 70
n := 1.1
Кх := 0.43
Rоб := 2100
N2 := 11
mоб := 0.9
мю := 2
Rср := 1300
Lоб := 12
ф := 0.65
е := 1
Rсм := 3200
Nсум := N1 + N2 = 81
Fтр := (Nсум*n)*1000/(Rоб*ф*mоб) = 72.5275
Lо := мю*Lоб*100 = 2400
hx := 24/20 = 1.2
hy12 := 24*1.2/51.6 = 0.55814
hy15 := 24*1.5/51.6 = 0.697674
hy := 65
Fтр/4 = 18.1319
# Номер профиля 10
ix0max := 3.84
Jx1 := 333
Fуг := 19.2
Jx := 179
Jy0min := 74.1
z0 := 2.83
b := 100
ix := 3.05
jx0max := 284
iy0min := 1.96
d := 10
Fоб := 4*Fуг = 76.8
Qусл := 20*Fоб = 1536
альфа := 45
Jуг := 179
y := 29.67
sqrt((Rоб*Fуг*mоб*4)/(Qусл*np*sinальфа) + лямбдауг^2)  # лямбдахкр
rуг := sqrt(Jуг/Fуг) = 3.05335
лямбдауг := Lо/rуг = 786.023
Jугх := Jуг + Fуг*y^2 = 17080.9
